#===============variable=============================
#=============thermostat=======================
variable nvt_dt            equal   0.001
variable nvt_nsteps        equal   20000
variable thermo_nsteps     equal   300
variable coor_nsteps       equal   1
variable cutoff            equal   6.2
variable neigh_skin        equal   0.5  # skin for the save the calculation of pbc
variable T_start           equal   300.0
variable T_end             equal   300.0
variable T_damp            equal   100*${nvt_dt}
variable seed              equal   999999999
variable mass1             equal   15.9994
variable mass2             equal   1.008
variable input_structure   string  data.lmp
variable integerate        string  verlet  # integerate algorithm in MD simulation
variable poten_function    string  eann
variable datatype          string  float  # optional float/double
#================electric field=================
variable e_x               equal   0.05            # V/A
variable e_y               equal   0.0            # V/A
variable e_z               equal   0.0            # V/A
#=======================comput rdf========================
variable compute_style     string  rdf
variable nbins_rdf         equal   63
variable nve_dt            equal   0.0002
variable nve_nsteps        equal   10000
variable nevery            equal   5
variable nrepeat           equal   2000
variable nfreq             equal   10000

units           metal
# this command should be used prior to setting up a simulation box via the create_box or
# read_data commands. Restart files also store this setting.
dimension       3          # simulation dimensions
#newton          off        # calculate the pair interaction on each processor
#processors      3  3  3           # processor on each dimension
boundary        p   p   p   # p/f/s period/non-period/shrink_warp
# This command must be used before a simulation is setup via a read_data, read_restart,
# or create_box command.
atom_style      atomic      # properties to store and read
# The id and map keywords must be specified before a simulation box is defined;
# other keywords can be specified any time.
#atom_modify     map yes   # non-zero atom IDs can be assigned to each atom.
#processors  1  1  1    # of processors in each dimension of 3d grid overlaying the simulation domain
read_data       ${input_structure}          # read data from the file
mass 1 ${mass1}          # set mass for element 1
mass 2 ${mass2}          # set mass for element 2
replicate  1  1  1

neighbor ${neigh_skin} bin   #skin = extra distance beyond force cutoff;style = bin or nsq or multi
velocity all create ${T_start} ${seed}
pair_style ${poten_function}
pair_coeff * * ${cutoff} ${datatype} ${e_x} ${e_y} ${e_z}
#dump 1 all atom ${coor_nsteps} dump.atom  #output the trajectories configurations
# used for thermalstat
   timestep ${nvt_dt}
   #run_style ${integerate}
   fix 1 all nvt temp ${T_start} ${T_end} ${T_damp}
   thermo ${thermo_nsteps}
   run ${nvt_nsteps}

   reset_timestep 0
# used for calculate the rdf
   fix 1 all nvt temp ${T_start} ${T_end} ${T_damp}
   dump 11 all custom 10 dump.force_cpu id type x y z
   dump_modify 11 sort id
   run 100000
